Supra 3.4m F3J
#Mach
 0.0000
#IYsym   IZsym   Zsym
 0       0       0.0000
#Sref    Cref    Bref
 1034.0000 7.6000   133.8600
#Xref    Yref    Zref
 3.7500   0.0000   1.5000
#CDp
 0.0150
#========================================================
SURFACE
Inner Wing
#Nchord spacing
7       1.0000

YDUPLICATE
0.0

ANGLE
1.0000

#--------------------------------------------------------
SECTION
#Xle      Yle      Zle      Chord    Ainc     Nspan    Sspace
 0.0000   0.0000   0.0000   9.7500   0.0000   1        0.0000

AFILE
ag40d.dat

CONTROL
#name           gain  Xhinge  hvecX   hvecY   hvecZ   sgnDup
 aileron        1.00  0.7500  0.000   0.000   0.000   -1

#--------------------------------------------------------
SECTION
#Xle      Yle      Zle      Chord    Ainc     Nspan    Sspace
 0.2500   31.5000  1.3766   8.7500   0.0000   0        0.0000

AFILE
ag41d.dat

CONTROL
#name           gain  Xhinge  hvecX   hvecY   hvecZ   sgnDup
 aileron        1.00  0.7500  0.000   0.000   0.000   -1
#========================================================
SURFACE
Outer Wing
#Nchord spacing
7       1.0000

YDUPLICATE
0.0

ANGLE
1.0000

#--------------------------------------------------------
SECTION
#Xle      Yle      Zle      Chord    Ainc     Nspan    Sspace
 0.2500   31.5000  1.3765   8.7500   0.0000   1        0.0000

AFILE
ag41d.dat

CONTROL
#name           gain  Xhinge  hvecX   hvecY   hvecZ   sgnDup
 aileron        1.00  0.7500  0.000   0.000   0.000   -1

#--------------------------------------------------------
SECTION
#Xle      Yle      Zle      Chord    Ainc     Nspan    Sspace
 1.2500   55.0000  4.4703   6.2500   -0.5000  1        0.0000

AFILE
ag42d.dat

CONTROL
#name           gain  Xhinge  hvecX   hvecY   hvecZ   sgnDup
 aileron        1.00  0.7500  0.000   0.000   0.000   -1

#--------------------------------------------------------
SECTION
#Xle      Yle      Zle      Chord    Ainc     Nspan    Sspace
 1.9700   61.0000  5.2602   5.0000   -0.5000  1        0.0000

AFILE
ag42d.dat

CONTROL
#name           gain  Xhinge  hvecX   hvecY   hvecZ   sgnDup
 aileron        1.00  0.7500  0.000   0.000   0.000   -1

#--------------------------------------------------------
SECTION
#Xle      Yle      Zle      Chord    Ainc     Nspan    Sspace
 3.0000   65.5000  5.8526   3.4000   -0.5000  1        0.0000

AFILE
ag43d.dat

CONTROL
#name           gain  Xhinge  hvecX   hvecY   hvecZ   sgnDup
 aileron        1.00  0.7500  0.000   0.000   0.000   -1

#--------------------------------------------------------
SECTION
#Xle      Yle      Zle      Chord    Ainc     Nspan    Sspace
 3.7500   67.0000  6.0501   2.3000   -0.5000  0        0.0000

AFILE
ag43d.dat

CONTROL
#name           gain  Xhinge  hvecX   hvecY   hvecZ   sgnDup
 aileron        1.00  0.7500  0.000   0.000   0.000   -1
#========================================================
SURFACE
Stab
#Nchord spacing
5       1.0000

YDUPLICATE
0.0

ANGLE
0.0000

#--------------------------------------------------------
SECTION
#Xle      Yle      Zle      Chord    Ainc     Nspan    Sspace
 37.5000  0.0000   2.1000   4.4000   0.0000   5        1.0000

NACA
0012

CONTROL
#name           gain  Xhinge  hvecX   hvecY   hvecZ   sgnDup
 elevator       1.00  0.0000  0.000   0.000   0.000   1

#--------------------------------------------------------
SECTION
#Xle      Yle      Zle      Chord    Ainc     Nspan    Sspace
 37.6538  2.0000   2.1000   4.1154   0.0000   5        1.0000

NACA
0012

CONTROL
#name           gain  Xhinge  hvecX   hvecY   hvecZ   sgnDup
 elevator       1.00  0.0000  0.000   0.000   0.000   1

#--------------------------------------------------------
SECTION
#Xle      Yle      Zle      Chord    Ainc     Nspan    Sspace
 38.2692  10.0000  2.1000   2.5770   0.0000   5        1.0000

NACA
0012

CONTROL
#name           gain  Xhinge  hvecX   hvecY   hvecZ   sgnDup
 elevator       1.00  0.0000  0.000   0.000   0.000   1

#--------------------------------------------------------
SECTION
#Xle      Yle      Zle      Chord    Ainc     Nspan    Sspace
 38.6730  12.0000  2.1000   1.9420   0.0000   5        1.0000

NACA
0012

CONTROL
#name           gain  Xhinge  hvecX   hvecY   hvecZ   sgnDup
 elevator       1.00  0.0000  0.000   0.000   0.000   1

#--------------------------------------------------------
SECTION
#Xle      Yle      Zle      Chord    Ainc     Nspan    Sspace
 39.0000  12.7000  2.1000   1.5200   0.0000   5        1.0000

NACA
0012

CONTROL
#name           gain  Xhinge  hvecX   hvecY   hvecZ   sgnDup
 elevator       1.00  0.0000  0.000   0.000   0.000   1

#--------------------------------------------------------
SECTION
#Xle      Yle      Zle      Chord    Ainc     Nspan    Sspace
 39.5000  13.0000  2.1000   1.0000   0.0000   0        0.0000

NACA
0012

CONTROL
#name           gain  Xhinge  hvecX   hvecY   hvecZ   sgnDup
 elevator       1.00  0.0000  0.000   0.000   0.000   1
#========================================================
SURFACE
Fin
#Nchord spacing
10      1.0000

ANGLE
0.0000

#--------------------------------------------------------
SECTION
#Xle      Yle      Zle      Chord    Ainc     Nspan    Sspace
 42.5000  0.0000   0.0000   8.0500   0.0000   5        1.0000

NACA
0012

CONTROL
#name           gain  Xhinge  hvecX   hvecY   hvecZ   sgnDup
 rudder         1.00  0.4300  0.000   0.000   0.000   1

#--------------------------------------------------------
SECTION
#Xle      Yle      Zle      Chord    Ainc     Nspan    Sspace
 43.7938  0.0000   9.9000   4.6000   0.0000   5        1.0000

NACA
0012

CONTROL
#name           gain  Xhinge  hvecX   hvecY   hvecZ   sgnDup
 rudder         1.00  0.5000  0.000   0.000   0.000   1

#--------------------------------------------------------
SECTION
#Xle      Yle      Zle      Chord    Ainc     Nspan    Sspace
 44.6562  0.0000   12.3750  3.2583   0.0000   5        1.0000

NACA
0012

CONTROL
#name           gain  Xhinge  hvecX   hvecY   hvecZ   sgnDup
 rudder         1.00  0.5000  0.000   0.000   0.000   1

#--------------------------------------------------------
SECTION
#Xle      Yle      Zle      Chord    Ainc     Nspan    Sspace
 45.3750  0.0000   13.2000  2.3000   0.0000   0        0.0000

NACA
0012

CONTROL
#name           gain  Xhinge  hvecX   hvecY   hvecZ   sgnDup
 rudder         1.00  0.5000  0.000   0.000   0.000   1
